units metal
boundary p p p
atom_style atomic
timestep 0.001
echo log
variable li equal 1.000000
variable lf equal 0.571429
pair_style eam/alloy
read_data conf.equilibration.data
pair_coeff * * tests/Cu01.eam.alloy Cu
mass 1 63.546
run 0
change_box all x final 0.0 18.075000 y final 0.0 18.075000 z final 0.0 18.075000 remap units box
fix f1 all npt temp 400.000000 400.000000 0.100000 iso 0.000000 0.000000 0.100000
run 1000
unfix f1
variable xcm equal xcm(all,x)
variable ycm equal xcm(all,y)
variable zcm equal xcm(all,z)
fix f1 all npt temp 400.000000 400.000000 0.100000 iso 0.000000 0.000000 0.100000 fixedpoint ${xcm} ${ycm} ${zcm}
compute tcm all temp/com
fix_modify f1 temp tcm
variable step equal step
variable dU equal c_thermo_pe/atoms
thermo_style custom step pe c_tcm press vol
thermo 10000
velocity all create 400.000000 7271 mom yes rot yes dist gaussian
run 2500
variable T0_rs equal 400.000000
variable flambda equal 1.000000
variable blambda equal 0.571429
variable ftemp equal v_T0_rs/v_flambda
variable btemp equal v_T0_rs/v_blambda
pair_style hybrid/scaled v_flambda eam/alloy
pair_coeff * * eam/alloy tests/Cu01.eam.alloy Cu
fix f3 all print 1 "${dU} $(press) $(vol) ${flambda}" title "# dU[eV/atom] press[bar] vol[A^3] lambda" screen no file ts.forward_1.dat
variable flambda equal ramp(1.000000,0.869565)
fix f1 all npt temp 400.000000 400.000000 0.100000 iso 0.000000 0.000000 0.100000 fixedpoint ${xcm} ${ycm} ${zcm}
fix_modify f1 temp tcm
run 1000
variable flambda equal ramp(0.869565,0.769231)
fix f1 all npt temp 400.000000 400.000000 0.100000 iso 0.000000 0.000000 0.100000 fixedpoint ${xcm} ${ycm} ${zcm}
fix_modify f1 temp tcm
run 1000
variable flambda equal ramp(0.769231,0.689655)
fix f1 all npt temp 400.000000 400.000000 0.100000 iso 0.000000 0.000000 0.100000 fixedpoint ${xcm} ${ycm} ${zcm}
fix_modify f1 temp tcm
run 1000
variable flambda equal ramp(0.689655,0.625000)
fix f1 all npt temp 400.000000 400.000000 0.100000 iso 0.000000 0.000000 0.100000 fixedpoint ${xcm} ${ycm} ${zcm}
fix_modify f1 temp tcm
run 1000
variable flambda equal ramp(0.625000,0.571429)
fix f1 all npt temp 400.000000 400.000000 0.100000 iso 0.000000 0.000000 0.100000 fixedpoint ${xcm} ${ycm} ${zcm}
fix_modify f1 temp tcm
run 1000
unfix f3
write_data conf.ts.forward_1.data
